# Бета - распределение
# 1. Функция плотности распределения
# x := 0, 0.01 .. 1
f(x, a, b) := Γ(a + b)*x^(a - 1)*(1 - x)^(b - 1)/(Γ(a)*Γ(b))
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# 2. Функция распределения
D(x, a, b) := integral(f(x, a, b), x = 0 .. x)
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# 3. Мат.ожидание
M(a, b) := a/(a + b)
M(10, 1) = 0.909091
# 4. Дисперсия наработки
Di(a, b) := a*b/((a + b)^2*(a + b + 1))
Di(10, 1) = 0.00688705
# 5. Среднеквадратическое отклонение
σ(a, b) := sqrt(Di(a, b))
σ(10, 1) = 0.0829883
# 6. Функциональные зависимости и параметры, полученные с помощью имитации бета-распределения методом обратных функций.
n := 100
i := 0 .. n - 1
randVector := runif(n, 0, 1)
invar(r, t) := root(D(t, 10, 1) - r, t)
X[i] := invar(randVector[i], 1)
Xres := sort(X)
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bin := 100
lower := floor(min(X))
upper := ceil(max(X))
h := (upper - lower)/bin
j := 1 .. bin + 1
int[j] := lower + h*j
t := hist(int, X)/n
int := int + h/2
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# Математическое ожидание: | Дисперсия: | Среднеквадратическое отклонение:
Mres := sum(Xres[i], i = 0 .. n - 1)/n = 0.907525
Dires := sum(Xres[i]^2, i = 0 .. n - 1)/n - Mres^2 = 0.00881755
σres := sqrt(Dires) = 0.0939018
# Сравнение результатов:
M(10, 1) = 0.909091
Mres = 0.907525
Di(10, 1) = 0.00688705
Dires = 0.00881755
σ(10, 1) = 0.0829883
σres = 0.0939018
